<?xml version="1.0"?>
<Node name="root" dt="0.1" gravity="0 -9.81 0">

    <Node name="plugins">
        <RequiredPlugin pluginName="Elasticity"/>
        <RequiredPlugin pluginName="Sofa.Component.Constraint.Projective"/> <!-- Needed to use components [FixedProjectiveConstraint] -->
        <RequiredPlugin pluginName="Sofa.Component.Engine.Select"/> <!-- Needed to use components [BoxROI] -->
        <RequiredPlugin pluginName="Sofa.Component.LinearSolver.Direct"/> <!-- Needed to use components [SparseLDLSolver] -->
        <RequiredPlugin pluginName="Sofa.Component.LinearSolver.Iterative"/> <!-- Needed to use components [CGLinearSolver] -->
        <RequiredPlugin pluginName="Sofa.Component.Mass"/> <!-- Needed to use components [MeshMatrixMass] -->
        <RequiredPlugin pluginName="Sofa.Component.IntegrationScheme.Backward"/> <!-- Needed to use components [EulerImplicitIntegrationScheme] -->
        <RequiredPlugin pluginName="Sofa.Component.StateContainer"/> <!-- Needed to use components [MechanicalObject] -->
        <RequiredPlugin pluginName="Sofa.Component.Topology.Container.Dynamic"/> <!-- Needed to use components [TetrahedronSetGeometryAlgorithms,TetrahedronSetTopologyContainer,TetrahedronSetTopologyModifier] -->
        <RequiredPlugin pluginName="Sofa.Component.Topology.Container.Grid"/> <!-- Needed to use components [RegularGridTopology] -->
        <RequiredPlugin pluginName="Sofa.Component.Topology.Mapping"/> <!-- Needed to use components [Hexa2TetraTopologicalMapping] -->
        <RequiredPlugin pluginName="Sofa.Component.Visual"/> <!-- Needed to use components [LineAxis,VisualGrid,VisualStyle] -->
        <RequiredPlugin pluginName="Sofa.GL.Component.Rendering3D"/> <!-- Needed to use components [OglSceneFrame] -->
    </Node>

    <DefaultAnimationLoop parallelODESolving="false"/>
    <VisualStyle displayFlags="showBehaviorModels showForceFields" />

    <VisualGrid size="40"/>
    <LineAxis size="40"/>
    <OglSceneFrame/>


    <Node name="tetras_corot">
        <EulerImplicitIntegrationScheme name="backward Euler" rayleighStiffness="0.1" rayleighMass="0.1" />
        <CGLinearSolver iterations="25" name="linear_solver" tolerance="1.0e-9" threshold="1.0e-9"/>

        <RegularGridTopology name="grid" min="-15 -5 0" max="-5 5 40" n="5 5 20"/>
        <MechanicalObject template="Vec3" name="state" showObject="true"/>

        <Node name="tetra">
            <TetrahedronSetTopologyContainer name="Tetra_topo"/>
            <TetrahedronSetTopologyModifier name="Modifier" />
            <TetrahedronSetGeometryAlgorithms template="Vec3" name="GeomAlgo" drawTetrahedra="false"/>
            <Hexa2TetraTopologicalMapping input="@grid" output="@Tetra_topo" />

            <MeshMatrixMass totalMass="1500" topology="@Tetra_topo"/>
            <CorotationalFEMForceField name="FEM" youngModulus="2000" poissonRatio="0.45" topology="@Tetra_topo"/>
        </Node>

        <Node name="Data">
            <DataDisplay pointData="@../tetra/FEM.vonMisesStressValues" name="data"/>
            <OglColorMap colorScheme="Blue to Red" showLegend="true" min="@data.currentMin" max="@data.currentMax"/>
            <IdentityMapping input="@.." output="@."/>
        </Node>

        <BoxROI template="Vec3" name="box_roi" box="-16 -6 -1 -4 6 0.1" drawBoxes="1" />
        <FixedProjectiveConstraint template="Vec3" indices="@box_roi.indices" />
    </Node>


    <Node name="hexas_corot">
        <EulerImplicitIntegrationScheme name="backward Euler" rayleighStiffness="0.1" rayleighMass="0.1" />
        <CGLinearSolver iterations="25" name="linear_solver" tolerance="1.0e-9" threshold="1.0e-9"/>

        <RegularGridTopology name="grid" min="5 -5 0" max="15 5 40" n="5 5 20"/>
        <MechanicalObject template="Vec3" name="state" showObject="true"/>

        <MeshMatrixMass totalMass="1500" topology="@grid"/>
        <CorotationalFEMForceField name="FEM" youngModulus="2000" poissonRatio="0.45" topology="@grid"/>

        <Node name="Data">
            <DataDisplay pointData="@../FEM.vonMisesStressValues" name="data"/>
            <OglColorMap colorScheme="Blue to Red" showLegend="true" min="@data.currentMin" max="@data.currentMax"/>
            <IdentityMapping input="@.." output="@."/>
        </Node>

        <BoxROI template="Vec3" name="box_roi" box="4 -6 -1 16 6 0.1" drawBoxes="1" />
        <FixedProjectiveConstraint template="Vec3" indices="@box_roi.indices" />
    </Node>

</Node>
