<?xml version="1.0"?>
<Node name="root" dt="0.1" gravity="0 -9.81 0">

    <Node name="plugins">
        <RequiredPlugin pluginName="Elasticity"/>
        <RequiredPlugin pluginName="Sofa.Component.Constraint.Projective"/> <!-- Needed to use components [FixedProjectiveConstraint] -->
        <RequiredPlugin pluginName="Sofa.Component.Engine.Select"/> <!-- Needed to use components [BoxROI] -->
        <RequiredPlugin pluginName="Sofa.Component.LinearSolver.Direct"/> <!-- Needed to use components [SparseLDLSolver] -->
        <RequiredPlugin pluginName="Sofa.Component.LinearSolver.Iterative"/> <!-- Needed to use components [CGLinearSolver] -->
        <RequiredPlugin pluginName="Sofa.Component.Mass"/> <!-- Needed to use components [MeshMatrixMass] -->
        <RequiredPlugin pluginName="Sofa.Component.IntegrationScheme.Backward"/> <!-- Needed to use components [EulerImplicitIntegrationScheme] -->
        <RequiredPlugin pluginName="Sofa.Component.StateContainer"/> <!-- Needed to use components [MechanicalObject] -->
        <RequiredPlugin pluginName="Sofa.Component.Topology.Container.Dynamic"/> <!-- Needed to use components [TetrahedronSetGeometryAlgorithms,TetrahedronSetTopologyContainer,TetrahedronSetTopologyModifier] -->
        <RequiredPlugin pluginName="Sofa.Component.Topology.Container.Grid"/> <!-- Needed to use components [RegularGridTopology] -->
        <RequiredPlugin pluginName="Sofa.Component.Topology.Mapping"/> <!-- Needed to use components [Hexa2TetraTopologicalMapping] -->
        <RequiredPlugin pluginName="Sofa.Component.Visual"/> <!-- Needed to use components [LineAxis,VisualGrid,VisualStyle] -->
        <RequiredPlugin pluginName="Sofa.GL.Component.Rendering3D"/> <!-- Needed to use components [OglSceneFrame] -->
    </Node>

    <DefaultAnimationLoop parallelODESolving="true"/>
    <VisualStyle displayFlags="showBehaviorModels showForceFields" />

    <VisualGrid size="40"/>
    <LineAxis size="40"/>
    <OglSceneFrame/>

    <Node name="triangles2D">
        <EulerImplicitIntegrationScheme name="backward Euler" rayleighStiffness="0.1" rayleighMass="0.1" />
        <SparseLDLSolver template="CompressedRowSparseMatrixd"/>

        <RegularGridTopology name="grid" min="0 -10 0" max="20 -5 0" n="20 5 1"/>
        <MechanicalObject template="Vec2" name="state" showObject="true"/>
        <Node name="triangles">
            <TriangleSetTopologyContainer name="Triangle_topo" src="@../grid"/>
            <TriangleSetTopologyModifier name="Modifier" />
            <TriangleSetGeometryAlgorithms template="Vec2" name="GeomAlgo" drawTriangles="false"/>

            <MeshMatrixMass totalMass="1500" topology="@Triangle_topo" template="Vec2,Vec2"/>
            <CorotationalFEMForceField mstate="@../state" template="Vec2" name="FEM" youngModulus="100000" poissonRatio="0.45" topology="@Triangle_topo"/>
        </Node>

        <BoxROI template="Vec2" name="box_roi" box="-0.1 -10.1 -0.1  0.1 -4.9 0.1" drawBoxes="true" />
        <FixedProjectiveConstraint template="Vec2" indices="@box_roi.indices" />
    </Node>

    <Node name="quads2D">
        <EulerImplicitIntegrationScheme name="backward Euler" rayleighStiffness="0.1" rayleighMass="0.1" />
        <SparseLDLSolver template="CompressedRowSparseMatrixd"/>

        <RegularGridTopology name="grid" min="0 5 0" max="20 10 0" n="20 5 1"/>
        <MechanicalObject template="Vec2" name="state" showObject="true"/>
        <Node name="triangles">
            <QuadSetTopologyContainer name="quad_topo" src="@../grid"/>
            <QuadSetTopologyModifier name="Modifier" />
            <QuadSetGeometryAlgorithms template="Vec2" name="GeomAlgo" drawQuads="false"/>

            <MeshMatrixMass totalMass="1500" topology="@quad_topo" template="Vec2,Vec2"/>
            <CorotationalFEMForceField mstate="@../state" template="Vec2" name="FEM" youngModulus="100000" poissonRatio="0.45" topology="@quad_topo"/>
        </Node>

        <BoxROI template="Vec2" name="box_roi" box="-0.1 4.9 -0.1  0.1 10.1 0.1" drawBoxes="true" />
        <FixedProjectiveConstraint template="Vec2" indices="@box_roi.indices" />
    </Node>

</Node>
