<?xml version="1.0"?>
<Node name="root" dt="0.1" gravity="0 -9.81 0">

    <Node name="plugins">
        <RequiredPlugin pluginName="Elasticity"/>
        <RequiredPlugin pluginName="Sofa.Component.Constraint.Projective"/> <!-- Needed to use components [FixedProjectiveConstraint] -->
        <RequiredPlugin pluginName="Sofa.Component.Engine.Select"/> <!-- Needed to use components [BoxROI] -->
        <RequiredPlugin pluginName="Sofa.Component.LinearSolver.Direct"/> <!-- Needed to use components [SparseLDLSolver] -->
        <RequiredPlugin pluginName="Sofa.Component.LinearSolver.Iterative"/> <!-- Needed to use components [CGLinearSolver] -->
        <RequiredPlugin pluginName="Sofa.Component.Mass"/> <!-- Needed to use components [MeshMatrixMass] -->
        <RequiredPlugin pluginName="Sofa.Component.IntegrationScheme.Backward"/> <!-- Needed to use components [EulerImplicitIntegrationScheme] -->
        <RequiredPlugin pluginName="Sofa.Component.StateContainer"/> <!-- Needed to use components [MechanicalObject] -->
        <RequiredPlugin pluginName="Sofa.Component.Topology.Container.Dynamic"/> <!-- Needed to use components [TetrahedronSetGeometryAlgorithms,TetrahedronSetTopologyContainer,TetrahedronSetTopologyModifier] -->
        <RequiredPlugin pluginName="Sofa.Component.Topology.Container.Grid"/> <!-- Needed to use components [RegularGridTopology] -->
        <RequiredPlugin pluginName="Sofa.Component.Topology.Mapping"/> <!-- Needed to use components [Hexa2TetraTopologicalMapping] -->
        <RequiredPlugin pluginName="Sofa.Component.Visual"/> <!-- Needed to use components [LineAxis,VisualGrid,VisualStyle] -->
        <RequiredPlugin pluginName="Sofa.GL.Component.Rendering3D"/> <!-- Needed to use components [OglSceneFrame] -->
    </Node>

    <DefaultAnimationLoop parallelODESolving="true"/>
    <VisualStyle displayFlags="showBehaviorModels showForceFields" />

    <VisualGrid size="40"/>
    <LineAxis size="40"/>
    <OglSceneFrame/>

    <Node name="hexas">
        <EulerImplicitIntegrationScheme name="backward Euler" rayleighStiffness="0.1" rayleighMass="0.1" />
        <SparseLDLSolver template="CompressedRowSparseMatrixd"/>

        <RegularGridTopology name="grid" min="25 -5 0" max="35 5 40" n="5 5 20"/>
        <MechanicalObject template="Vec3" name="state" showObject="true"/>

        <Node name="tetra">
            <HexahedronSetTopologyContainer name="Hexa_topo" src="@../grid"/>
            <HexahedronSetTopologyModifier name="Modifier" />
            <HexahedronSetGeometryAlgorithms template="Vec3" name="GeomAlgo" drawHexahedra="true"/>

            <MeshMatrixMass totalMass="1500" topology="@Hexa_topo"/>
            <HexahedronLinearSmallStrainFEMForceField name="FEM" youngModulus="10000" poissonRatio="0.45" topology="@Hexa_topo"/>
        </Node>

        <BoxROI template="Vec3" name="box_roi" box="24 -6 -1 36 6 0.1" drawBoxes="1" />
        <FixedProjectiveConstraint template="Vec3" indices="@box_roi.indices" />
    </Node>

</Node>
